**
** Heading +++++++++++++++++++++++++++++++++++++++++++++++++
**
*Heading
Hash: 3lWUJp8H, Date: 01/25/2026, Unit system: M_KG_S_C
**
** Nodes +++++++++++++++++++++++++++++++++++++++++++++++++++
**
*Node
1, -2.50000000E-001, 3.00000000E-002, -5.00000000E-002
2, -2.50000000E-001, -3.00000000E-002, -5.00000000E-002
3, 2.50000000E-001, -3.00000000E-002, -5.00000000E-002
4, 2.50000000E-001, 3.00000000E-002, -5.00000000E-002
5, 2.50000000E-001, -3.00000000E-002, 5.00000000E-002
6, 2.50000000E-001, 3.00000000E-002, 5.00000000E-002
7, -2.50000000E-001, -3.00000000E-002, 5.00000000E-002
8, -2.50000000E-001, 3.00000000E-002, 5.00000000E-002
9, -2.50000000E-001, -1.00613962E-016, -5.00000000E-002
10, -2.50000000E-001, 1.50000000E-002, -5.00000000E-002
11, -2.50000000E-001, -1.50000000E-002, -5.00000000E-002
12, -1.87500000E-001, -3.00000000E-002, -5.00000000E-002
13, -1.25000000E-001, -3.00000000E-002, -5.00000000E-002
14, -6.25000000E-002, -3.00000000E-002, -5.00000000E-002
15, 0.00000000E+000, -3.00000000E-002, -5.00000000E-002
16, 6.25000000E-002, -3.00000000E-002, -5.00000000E-002
17, 1.25000000E-001, -3.00000000E-002, -5.00000000E-002
18, 1.87500000E-001, -3.00000000E-002, -5.00000000E-002
19, -2.18750000E-001, -3.00000000E-002, -5.00000000E-002
20, -1.56250000E-001, -3.00000000E-002, -5.00000000E-002
21, -9.37500000E-002, -3.00000000E-002, -5.00000000E-002
22, -3.12500000E-002, -3.00000000E-002, -5.00000000E-002
23, 3.12500000E-002, -3.00000000E-002, -5.00000000E-002
24, 9.37500000E-002, -3.00000000E-002, -5.00000000E-002
25, 1.56250000E-001, -3.00000000E-002, -5.00000000E-002
26, 2.18750000E-001, -3.00000000E-002, -5.00000000E-002
27, 2.50000000E-001, -1.00613962E-016, -5.00000000E-002
28, 2.50000000E-001, 1.50000000E-002, -5.00000000E-002
29, 2.50000000E-001, -1.50000000E-002, -5.00000000E-002
30, -1.87500000E-001, 3.00000000E-002, -5.00000000E-002
31, -1.25000000E-001, 3.00000000E-002, -5.00000000E-002
32, -6.25000000E-002, 3.00000000E-002, -5.00000000E-002
33, 0.00000000E+000, 3.00000000E-002, -5.00000000E-002
34, 6.25000000E-002, 3.00000000E-002, -5.00000000E-002
35, 1.25000000E-001, 3.00000000E-002, -5.00000000E-002
36, 1.87500000E-001, 3.00000000E-002, -5.00000000E-002
37, -2.18750000E-001, 3.00000000E-002, -5.00000000E-002
38, -1.56250000E-001, 3.00000000E-002, -5.00000000E-002
39, -9.37500000E-002, 3.00000000E-002, -5.00000000E-002
40, -3.12500000E-002, 3.00000000E-002, -5.00000000E-002
41, 3.12500000E-002, 3.00000000E-002, -5.00000000E-002
42, 9.37500000E-002, 3.00000000E-002, -5.00000000E-002
43, 1.56250000E-001, 3.00000000E-002, -5.00000000E-002
44, 2.18750000E-001, 3.00000000E-002, -5.00000000E-002
45, 2.50000000E-001, -3.00000000E-002, 3.46944695E-017
46, 2.50000000E-001, -3.00000000E-002, -2.50000000E-002
47, 2.50000000E-001, -3.00000000E-002, 2.50000000E-002
48, 2.50000000E-001, -1.00613962E-016, 5.00000000E-002
49, 2.50000000E-001, 1.50000000E-002, 5.00000000E-002
50, 2.50000000E-001, -1.50000000E-002, 5.00000000E-002
51, 2.50000000E-001, 3.00000000E-002, 3.46944695E-017
52, 2.50000000E-001, 3.00000000E-002, -2.50000000E-002
53, 2.50000000E-001, 3.00000000E-002, 2.50000000E-002
54, 1.87500000E-001, -3.00000000E-002, 5.00000000E-002
55, 1.25000000E-001, -3.00000000E-002, 5.00000000E-002
56, 6.25000000E-002, -3.00000000E-002, 5.00000000E-002
57, 0.00000000E+000, -3.00000000E-002, 5.00000000E-002
58, -6.25000000E-002, -3.00000000E-002, 5.00000000E-002
59, -1.25000000E-001, -3.00000000E-002, 5.00000000E-002
60, -1.87500000E-001, -3.00000000E-002, 5.00000000E-002
61, 2.18750000E-001, -3.00000000E-002, 5.00000000E-002
62, 1.56250000E-001, -3.00000000E-002, 5.00000000E-002
63, 9.37500000E-002, -3.00000000E-002, 5.00000000E-002
64, 3.12500000E-002, -3.00000000E-002, 5.00000000E-002
65, -3.12500000E-002, -3.00000000E-002, 5.00000000E-002
66, -9.37500000E-002, -3.00000000E-002, 5.00000000E-002
67, -1.56250000E-001, -3.00000000E-002, 5.00000000E-002
68, -2.18750000E-001, -3.00000000E-002, 5.00000000E-002
69, -2.50000000E-001, -1.00613962E-016, 5.00000000E-002
70, -2.50000000E-001, 1.50000000E-002, 5.00000000E-002
71, -2.50000000E-001, -1.50000000E-002, 5.00000000E-002
72, 1.87500000E-001, 3.00000000E-002, 5.00000000E-002
73, 1.25000000E-001, 3.00000000E-002, 5.00000000E-002
74, 6.25000000E-002, 3.00000000E-002, 5.00000000E-002
75, 0.00000000E+000, 3.00000000E-002, 5.00000000E-002
76, -6.25000000E-002, 3.00000000E-002, 5.00000000E-002
77, -1.25000000E-001, 3.00000000E-002, 5.00000000E-002
78, -1.87500000E-001, 3.00000000E-002, 5.00000000E-002
79, 2.18750000E-001, 3.00000000E-002, 5.00000000E-002
80, 1.56250000E-001, 3.00000000E-002, 5.00000000E-002
81, 9.37500000E-002, 3.00000000E-002, 5.00000000E-002
82, 3.12500000E-002, 3.00000000E-002, 5.00000000E-002
83, -3.12500000E-002, 3.00000000E-002, 5.00000000E-002
84, -9.37500000E-002, 3.00000000E-002, 5.00000000E-002
85, -1.56250000E-001, 3.00000000E-002, 5.00000000E-002
86, -2.18750000E-001, 3.00000000E-002, 5.00000000E-002
87, -2.50000000E-001, -3.00000000E-002, -3.46944695E-017
88, -2.50000000E-001, -3.00000000E-002, 2.50000000E-002
89, -2.50000000E-001, -3.00000000E-002, -2.50000000E-002
90, -2.50000000E-001, 3.00000000E-002, -3.46944695E-017
91, -2.50000000E-001, 3.00000000E-002, 2.50000000E-002
92, -2.50000000E-001, 3.00000000E-002, -2.50000000E-002
93, -1.87500000E-001, -1.00613962E-016, -5.00000000E-002
94, -1.25000000E-001, -1.04083409E-016, -5.00000000E-002
95, -6.25000000E-002, -1.04083409E-016, -5.00000000E-002
96, 0.00000000E+000, -1.00613962E-016, -5.00000000E-002
97, 6.25000000E-002, -9.71445147E-017, -5.00000000E-002
98, 1.25000000E-001, -1.04083409E-016, -5.00000000E-002
99, 1.87500000E-001, -1.00613962E-016, -5.00000000E-002
100, -1.87500000E-001, 1.50000000E-002, -5.00000000E-002
101, -2.18750000E-001, -1.00613962E-016, -5.00000000E-002
102, -1.25000000E-001, 1.50000000E-002, -5.00000000E-002
103, -1.56250000E-001, -1.02348685E-016, -5.00000000E-002
104, -6.25000000E-002, 1.50000000E-002, -5.00000000E-002
105, -9.37500000E-002, -1.04083409E-016, -5.00000000E-002
106, 0.00000000E+000, 1.50000000E-002, -5.00000000E-002
107, -3.12500000E-002, -1.02348685E-016, -5.00000000E-002
108, 6.25000000E-002, 1.50000000E-002, -5.00000000E-002
109, 3.12500000E-002, -9.88792381E-017, -5.00000000E-002
110, 1.25000000E-001, 1.50000000E-002, -5.00000000E-002
111, 9.37500000E-002, -1.00613962E-016, -5.00000000E-002
112, 1.87500000E-001, 1.50000000E-002, -5.00000000E-002
113, 1.56250000E-001, -1.02348685E-016, -5.00000000E-002
114, 2.18750000E-001, -1.00613962E-016, -5.00000000E-002
115, -1.87500000E-001, -1.50000000E-002, -5.00000000E-002
116, -1.25000000E-001, -1.50000000E-002, -5.00000000E-002
117, -6.25000000E-002, -1.50000000E-002, -5.00000000E-002
118, 0.00000000E+000, -1.50000000E-002, -5.00000000E-002
119, 6.25000000E-002, -1.50000000E-002, -5.00000000E-002
120, 1.25000000E-001, -1.50000000E-002, -5.00000000E-002
121, 1.87500000E-001, -1.50000000E-002, -5.00000000E-002
122, 2.50000000E-001, -9.02056208E-017, 3.46944695E-017
123, 2.50000000E-001, 1.50000000E-002, 3.46944695E-017
124, 2.50000000E-001, -9.54097912E-017, -2.50000000E-002
125, 2.50000000E-001, -9.54097912E-017, 2.50000000E-002
126, 2.50000000E-001, -1.50000000E-002, 3.46944695E-017
127, 1.87500000E-001, -1.00613962E-016, 5.00000000E-002
128, 1.25000000E-001, -1.04083409E-016, 5.00000000E-002
129, 6.25000000E-002, -1.04083409E-016, 5.00000000E-002
130, 0.00000000E+000, -1.00613962E-016, 5.00000000E-002
131, -6.25000000E-002, -9.71445147E-017, 5.00000000E-002
132, -1.25000000E-001, -1.04083409E-016, 5.00000000E-002
133, -1.87500000E-001, -1.00613962E-016, 5.00000000E-002
134, 1.87500000E-001, 1.50000000E-002, 5.00000000E-002
135, 2.18750000E-001, -1.00613962E-016, 5.00000000E-002
136, 1.25000000E-001, 1.50000000E-002, 5.00000000E-002
137, 1.56250000E-001, -1.02348685E-016, 5.00000000E-002
138, 6.25000000E-002, 1.50000000E-002, 5.00000000E-002
139, 9.37500000E-002, -1.04083409E-016, 5.00000000E-002
140, 0.00000000E+000, 1.50000000E-002, 5.00000000E-002
141, 3.12500000E-002, -1.02348685E-016, 5.00000000E-002
142, -6.25000000E-002, 1.50000000E-002, 5.00000000E-002
143, -3.12500000E-002, -9.88792381E-017, 5.00000000E-002
144, -1.25000000E-001, 1.50000000E-002, 5.00000000E-002
145, -9.37500000E-002, -1.00613962E-016, 5.00000000E-002
146, -1.87500000E-001, 1.50000000E-002, 5.00000000E-002
147, -1.56250000E-001, -1.02348685E-016, 5.00000000E-002
148, -2.18750000E-001, -1.00613962E-016, 5.00000000E-002
149, 1.87500000E-001, -1.50000000E-002, 5.00000000E-002
150, 1.25000000E-001, -1.50000000E-002, 5.00000000E-002
151, 6.25000000E-002, -1.50000000E-002, 5.00000000E-002
152, 0.00000000E+000, -1.50000000E-002, 5.00000000E-002
153, -6.25000000E-002, -1.50000000E-002, 5.00000000E-002
154, -1.25000000E-001, -1.50000000E-002, 5.00000000E-002
155, -1.87500000E-001, -1.50000000E-002, 5.00000000E-002
156, -2.50000000E-001, -1.07552856E-016, -4.16333634E-017
157, -2.50000000E-001, 1.50000000E-002, -3.81639165E-017
158, -2.50000000E-001, -1.04083409E-016, 2.50000000E-002
159, -2.50000000E-001, -1.04083409E-016, -2.50000000E-002
160, -2.50000000E-001, -1.50000000E-002, -3.81639165E-017
161, -1.87500000E-001, 3.00000000E-002, -2.68882139E-017
162, -1.25000000E-001, 3.00000000E-002, -1.56125113E-017
163, -6.25000000E-002, 3.00000000E-002, -8.67361738E-018
164, -5.78241159E-018, 3.00000000E-002, 2.28030105E-031
165, 6.25000000E-002, 3.00000000E-002, 8.67361738E-018
166, 1.25000000E-001, 3.00000000E-002, 1.73472348E-017
167, 1.87500000E-001, 3.00000000E-002, 2.60208521E-017
168, -1.87500000E-001, 3.00000000E-002, 2.50000000E-002
169, -2.18750000E-001, 3.00000000E-002, -3.07913417E-017
170, -1.25000000E-001, 3.00000000E-002, 2.50000000E-002
171, -1.56250000E-001, 3.00000000E-002, -2.12503626E-017
172, -6.25000000E-002, 3.00000000E-002, 2.50000000E-002
173, -9.37500000E-002, 3.00000000E-002, -1.21430643E-017
174, -2.89120579E-018, 3.00000000E-002, 2.50000000E-002
175, -3.12500000E-002, 3.00000000E-002, -4.33680869E-018
176, 6.25000000E-002, 3.00000000E-002, 2.50000000E-002
177, 3.12500000E-002, 3.00000000E-002, 4.33680869E-018
178, 1.25000000E-001, 3.00000000E-002, 2.50000000E-002
179, 9.37500000E-002, 3.00000000E-002, 1.30104261E-017
180, 1.87500000E-001, 3.00000000E-002, 2.50000000E-002
181, 1.56250000E-001, 3.00000000E-002, 2.16840434E-017
182, 2.18750000E-001, 3.00000000E-002, 3.03576608E-017
183, -1.87500000E-001, 3.00000000E-002, -2.50000000E-002
184, -1.25000000E-001, 3.00000000E-002, -2.50000000E-002
185, -6.25000000E-002, 3.00000000E-002, -2.50000000E-002
186, -2.89120579E-018, 3.00000000E-002, -2.50000000E-002
187, 6.25000000E-002, 3.00000000E-002, -2.50000000E-002
188, 1.25000000E-001, 3.00000000E-002, -2.50000000E-002
189, 1.87500000E-001, 3.00000000E-002, -2.50000000E-002
190, -1.87500000E-001, -3.00000000E-002, -2.51534904E-017
191, -1.25000000E-001, -3.00000000E-002, -1.90819582E-017
192, -6.25000000E-002, -3.00000000E-002, -8.67361738E-018
193, -5.78241159E-018, -3.00000000E-002, -2.28030105E-031
194, 6.25000000E-002, -3.00000000E-002, 1.04083409E-017
195, 1.25000000E-001, -3.00000000E-002, 1.38777878E-017
196, 1.87500000E-001, -3.00000000E-002, 2.60208521E-017
197, -2.18750000E-001, -3.00000000E-002, -2.99239800E-017
198, -1.87500000E-001, -3.00000000E-002, 2.50000000E-002
199, -1.56250000E-001, -3.00000000E-002, -2.21177243E-017
200, -1.25000000E-001, -3.00000000E-002, 2.50000000E-002
201, -9.37500000E-002, -3.00000000E-002, -1.38777878E-017
202, -6.25000000E-002, -3.00000000E-002, 2.50000000E-002
203, -3.12500000E-002, -3.00000000E-002, -4.33680869E-018
204, -2.89120579E-018, -3.00000000E-002, 2.50000000E-002
205, 3.12500000E-002, -3.00000000E-002, 5.20417043E-018
206, 6.25000000E-002, -3.00000000E-002, 2.50000000E-002
207, 9.37500000E-002, -3.00000000E-002, 1.21430643E-017
208, 1.25000000E-001, -3.00000000E-002, 2.50000000E-002
209, 1.56250000E-001, -3.00000000E-002, 1.99493200E-017
210, 1.87500000E-001, -3.00000000E-002, 2.50000000E-002
211, 2.18750000E-001, -3.00000000E-002, 3.03576608E-017
212, -1.87500000E-001, -3.00000000E-002, -2.50000000E-002
213, -1.25000000E-001, -3.00000000E-002, -2.50000000E-002
214, -6.25000000E-002, -3.00000000E-002, -2.50000000E-002
215, -2.89120579E-018, -3.00000000E-002, -2.50000000E-002
216, 6.25000000E-002, -3.00000000E-002, -2.50000000E-002
217, 1.25000000E-001, -3.00000000E-002, -2.50000000E-002
218, 1.87500000E-001, -3.00000000E-002, -2.50000000E-002
219, -1.87500000E-001, -9.64939934E-017, -3.25260652E-017
220, -1.25000000E-001, -1.01047642E-016, -2.86229374E-017
221, -6.25000000E-002, -9.67108338E-017, -1.04083409E-017
222, 0.00000000E+000, -9.88792381E-017, -5.20417043E-018
223, 6.25000000E-002, -9.97465999E-017, 1.04083409E-017
224, 1.25000000E-001, -1.03216047E-016, 1.38777878E-017
225, 1.87500000E-001, -1.01481323E-016, 2.77555756E-017
226, -1.87500000E-001, -9.85539775E-017, -2.50000000E-002
227, -2.18750000E-001, -1.02023424E-016, -3.70797143E-017
228, -1.87500000E-001, 1.50000000E-002, -2.97071395E-017
229, -1.87500000E-001, -9.85539775E-017, 2.50000000E-002
230, -1.25000000E-001, -1.02565526E-016, -2.50000000E-002
231, -1.56250000E-001, -9.87708179E-017, -3.05745013E-017
232, -1.25000000E-001, 1.50000000E-002, -2.21177243E-017
233, -1.25000000E-001, -1.02565526E-016, 2.50000000E-002
234, -6.25000000E-002, -1.00397121E-016, -2.50000000E-002
235, -9.37500000E-002, -9.88792381E-017, -1.95156391E-017
236, -6.25000000E-002, 1.50000000E-002, -9.54097912E-018
237, -6.25000000E-002, -9.69276742E-017, 2.50000000E-002
238, 0.00000000E+000, -9.97465999E-017, -2.50000000E-002
239, -3.12500000E-002, -9.77950360E-017, -7.80625564E-018
240, -2.89120579E-018, 1.50000000E-002, -2.60208521E-018
241, 0.00000000E+000, -9.97465999E-017, 2.50000000E-002
242, 6.25000000E-002, -9.84455573E-017, -2.50000000E-002
243, 3.12500000E-002, -9.93129190E-017, 2.60208521E-018
244, 6.25000000E-002, 1.50000000E-002, 9.54097912E-018
245, 6.25000000E-002, -1.01915004E-016, 2.50000000E-002
246, 1.25000000E-001, -1.03649728E-016, -2.50000000E-002
247, 9.37500000E-002, -1.01481323E-016, 1.21430643E-017
248, 1.25000000E-001, 1.50000000E-002, 1.56125113E-017
249, 1.25000000E-001, -1.03649728E-016, 2.50000000E-002
250, 1.87500000E-001, -1.01047642E-016, -2.50000000E-002
251, 1.56250000E-001, -1.02348685E-016, 2.08166817E-017
252, 1.87500000E-001, 1.50000000E-002, 2.68882139E-017
253, 1.87500000E-001, -1.01047642E-016, 2.50000000E-002
254, 2.18750000E-001, -9.58434720E-017, 3.12250226E-017
255, -1.87500000E-001, -1.50000000E-002, -2.88397778E-017
256, -1.25000000E-001, -1.50000000E-002, -2.38524478E-017
257, -6.25000000E-002, -1.50000000E-002, -9.54097912E-018
258, -2.89120579E-018, -1.50000000E-002, -2.60208521E-018
259, 6.25000000E-002, -1.50000000E-002, 1.04083409E-017
260, 1.25000000E-001, -1.50000000E-002, 1.38777878E-017
261, 1.87500000E-001, -1.50000000E-002, 2.68882139E-017
**
** Elements ++++++++++++++++++++++++++++++++++++++++++++++++
**
*Element, Type=C3D20, Elset=Solid_part-1
1, 1, 9, 93, 30, 90, 156, 219, 161, 10, 101, 100, 37, 157, 227, 228,
169, 92, 159, 226, 183
2, 90, 156, 219, 161, 8, 69, 133, 78, 157, 227, 228, 169, 70, 148, 146,
86, 91, 158, 229, 168
3, 30, 93, 94, 31, 161, 219, 220, 162, 100, 103, 102, 38, 228, 231, 232,
171, 183, 226, 230, 184
4, 161, 219, 220, 162, 78, 133, 132, 77, 228, 231, 232, 171, 146, 147, 144,
85, 168, 229, 233, 170
5, 31, 94, 95, 32, 162, 220, 221, 163, 102, 105, 104, 39, 232, 235, 236,
173, 184, 230, 234, 185
6, 162, 220, 221, 163, 77, 132, 131, 76, 232, 235, 236, 173, 144, 145, 142,
84, 170, 233, 237, 172
7, 32, 95, 96, 33, 163, 221, 222, 164, 104, 107, 106, 40, 236, 239, 240,
175, 185, 234, 238, 186
8, 163, 221, 222, 164, 76, 131, 130, 75, 236, 239, 240, 175, 142, 143, 140,
83, 172, 237, 241, 174
9, 33, 96, 97, 34, 164, 222, 223, 165, 106, 109, 108, 41, 240, 243, 244,
177, 186, 238, 242, 187
10, 164, 222, 223, 165, 75, 130, 129, 74, 240, 243, 244, 177, 140, 141, 138,
82, 174, 241, 245, 176
11, 34, 97, 98, 35, 165, 223, 224, 166, 108, 111, 110, 42, 244, 247, 248,
179, 187, 242, 246, 188
12, 165, 223, 224, 166, 74, 129, 128, 73, 244, 247, 248, 179, 138, 139, 136,
81, 176, 245, 249, 178
13, 35, 98, 99, 36, 166, 224, 225, 167, 110, 113, 112, 43, 248, 251, 252,
181, 188, 246, 250, 189
14, 166, 224, 225, 167, 73, 128, 127, 72, 248, 251, 252, 181, 136, 137, 134,
80, 178, 249, 253, 180
15, 36, 99, 27, 4, 167, 225, 122, 51, 112, 114, 28, 44, 252, 254, 123,
182, 189, 250, 124, 52
16, 167, 225, 122, 51, 72, 127, 48, 6, 252, 254, 123, 182, 134, 135, 49,
79, 180, 253, 125, 53
17, 9, 2, 12, 93, 156, 87, 190, 219, 11, 19, 115, 101, 160, 197, 255,
227, 159, 89, 212, 226
18, 156, 87, 190, 219, 69, 7, 60, 133, 160, 197, 255, 227, 71, 68, 155,
148, 158, 88, 198, 229
19, 93, 12, 13, 94, 219, 190, 191, 220, 115, 20, 116, 103, 255, 199, 256,
231, 226, 212, 213, 230
20, 219, 190, 191, 220, 133, 60, 59, 132, 255, 199, 256, 231, 155, 67, 154,
147, 229, 198, 200, 233
21, 94, 13, 14, 95, 220, 191, 192, 221, 116, 21, 117, 105, 256, 201, 257,
235, 230, 213, 214, 234
22, 220, 191, 192, 221, 132, 59, 58, 131, 256, 201, 257, 235, 154, 66, 153,
145, 233, 200, 202, 237
23, 95, 14, 15, 96, 221, 192, 193, 222, 117, 22, 118, 107, 257, 203, 258,
239, 234, 214, 215, 238
24, 221, 192, 193, 222, 131, 58, 57, 130, 257, 203, 258, 239, 153, 65, 152,
143, 237, 202, 204, 241
25, 96, 15, 16, 97, 222, 193, 194, 223, 118, 23, 119, 109, 258, 205, 259,
243, 238, 215, 216, 242
26, 222, 193, 194, 223, 130, 57, 56, 129, 258, 205, 259, 243, 152, 64, 151,
141, 241, 204, 206, 245
27, 97, 16, 17, 98, 223, 194, 195, 224, 119, 24, 120, 111, 259, 207, 260,
247, 242, 216, 217, 246
28, 223, 194, 195, 224, 129, 56, 55, 128, 259, 207, 260, 247, 151, 63, 150,
139, 245, 206, 208, 249
29, 98, 17, 18, 99, 224, 195, 196, 225, 120, 25, 121, 113, 260, 209, 261,
251, 246, 217, 218, 250
30, 224, 195, 196, 225, 128, 55, 54, 127, 260, 209, 261, 251, 150, 62, 149,
137, 249, 208, 210, 253
31, 99, 18, 3, 27, 225, 196, 45, 122, 121, 26, 29, 114, 261, 211, 126,
254, 250, 218, 46, 124
32, 225, 196, 45, 122, 127, 54, 5, 48, 261, 211, 126, 254, 149, 61, 50,
135, 253, 210, 47, 125
**
** Node sets +++++++++++++++++++++++++++++++++++++++++++++++
**
*Nset, Nset=Internal_Selection-1_Fixed-1
1, 2, 7, 8, 9, 10, 11, 69, 70, 71, 87, 88, 89, 90, 91, 92,
156, 157, 158, 159, 160
*Nset, Nset=Internal-1_Internal_Selection-1_Surface_Traction-1
3, 4, 5, 6, 27, 28, 29, 45, 46, 47, 48, 49, 50, 51, 52, 53,
122, 123, 124, 125, 126
**
** Element sets ++++++++++++++++++++++++++++++++++++++++++++
**
*Elset, Elset=Internal_Selection-1_Solid_Section-1
Solid_part-1
*Elset, Elset=Internal-1_Internal_Selection-1_Surface_Traction-1_S5
15, 16, 31, 32
**
** Surfaces ++++++++++++++++++++++++++++++++++++++++++++++++
**
*Surface, Name=Internal_Selection-1_Surface_Traction-1, Type=Element
Internal-1_Internal_Selection-1_Surface_Traction-1_S5, S5
**
** Physical constants ++++++++++++++++++++++++++++++++++++++
**
**
** Coordinate systems ++++++++++++++++++++++++++++++++++++++
**
**
** Materials +++++++++++++++++++++++++++++++++++++++++++++++
**
*Material, Name=S235
*Density
7800
*Elastic
210000000000, 0.28
*Expansion, Zero=20
1.1E-05
*Conductivity
14
*Specific heat
440
**
** Sections ++++++++++++++++++++++++++++++++++++++++++++++++
**
*Solid section, Elset=Internal_Selection-1_Solid_Section-1, Material=S235
**
** Pre-tension sections ++++++++++++++++++++++++++++++++++++
**
**
** Constraints +++++++++++++++++++++++++++++++++++++++++++++
**
**
** Surface interactions ++++++++++++++++++++++++++++++++++++
**
**
** Contact pairs +++++++++++++++++++++++++++++++++++++++++++
**
**
** Amplitudes ++++++++++++++++++++++++++++++++++++++++++++++
**
**
** Initial conditions ++++++++++++++++++++++++++++++++++++++
**
**
** Steps +++++++++++++++++++++++++++++++++++++++++++++++++++
**
**
** Step-1 ++++++++++++++++++++++++++++++++++++++++++++++++++
**
*Step
*Static
**
** Controls ++++++++++++++++++++++++++++++++++++++++++++++++
**
**
** Output frequency ++++++++++++++++++++++++++++++++++++++++
**
*Output, Frequency=1
**
** Boundary conditions +++++++++++++++++++++++++++++++++++++
**
*Boundary, op=New
** Name: Fixed-1
*Boundary
Internal_Selection-1_Fixed-1, 1, 6, 0
**
** Loads +++++++++++++++++++++++++++++++++++++++++++++++++++
**
*Cload, op=New
*Dload, op=New
** Name: Surface_Traction-1
*Cload
27, 2, 41.6666666666667
122, 2, 83.3333333333333
51, 2, 41.6666666666668
4, 2, 20.8333333333334
124, 2, -1.66666667E+002
123, 2, -1.66666667E+002
52, 2, -8.33333333E+001
28, 2, -8.33333333E+001
48, 2, 41.6666666666667
6, 2, 20.8333333333334
125, 2, -1.66666667E+002
49, 2, -8.33333333E+001
53, 2, -8.33333333E+001
3, 2, 20.8333333333333
45, 2, 41.6666666666665
46, 2, -8.33333333E+001
126, 2, -1.66666667E+002
29, 2, -8.33333333E+001
5, 2, 20.8333333333333
47, 2, -83.333333333333
50, 2, -83.333333333333
**
** Defined fields ++++++++++++++++++++++++++++++++++++++++++
**
**
** History outputs +++++++++++++++++++++++++++++++++++++++++
**
**
** Field outputs +++++++++++++++++++++++++++++++++++++++++++
**
*Node file
RF, U
*El file
S, E, NOE
**
** End step ++++++++++++++++++++++++++++++++++++++++++++++++
**
*End step
