**
** Heading +++++++++++++++++++++++++++++++++++++++++++++++++
**
*Heading
Hash: 9lAXveLf, Date: 03/15/2026, Unit system: M_KG_S_C
**
** Nodes +++++++++++++++++++++++++++++++++++++++++++++++++++
**
*Node
1, -1.00000000E+000, 5.00000000E-002, -5.00000000E-002
2, -1.00000000E+000, -5.00000000E-002, -5.00000000E-002
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**
** Elements ++++++++++++++++++++++++++++++++++++++++++++++++
**
*Element, Type=C3D20, Elset=Solid_beam
1, 1, 9, 101, 34, 8, 77, 147, 88, 10, 111, 110, 43, 78, 166, 164,
98, 100, 176, 195, 177
2, 34, 101, 102, 35, 88, 147, 146, 87, 110, 113, 112, 44, 164, 165, 162,
97, 177, 195, 196, 178
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*Element, Type=S8, Elset=Shell_bottom
41, 267, 269, 291, 271, 290, 300, 311, 280
42, 271, 291, 292, 272, 311, 301, 312, 281
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*Element, Type=S8, Elset=Shell_top
21, 204, 206, 228, 208, 227, 237, 248, 217
22, 208, 228, 229, 209, 248, 238, 249, 218
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**
** Node sets +++++++++++++++++++++++++++++++++++++++++++++++
**
*Nset, Nset=Internal_Selection-1_Fixed-1
1, 2, 7, 8, 9, 10, 11, 77, 78, 79, 99, 100, 176
*Nset, Nset=Internal-1_Internal_Selection-1_Surface_Traction-1
3, 4, 5, 6, 31, 32, 33, 53, 54, 55, 56, 57, 138
*Nset, Nset=Internal-1_Internal_Selection-1_Shell_top_to_Solid_beam_Master
204, 205, 206, 207, 208, 209
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*Nset, Nset=Internal-1_Internal_Selection-1_Shell_top_to_Solid_beam_Slave
1, 4, 6, 8, 34, 35
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*Nset, Nset=Internal-1_Internal_Selection-1_Shell_bottom_to_Solid_beam_Master
267, 268, 269, 270, 271, 272
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*Nset, Nset=Internal-1_Internal_Selection-1_Shell_bottom_to_Solid_beam_Slave
2, 3, 5, 7, 12, 13
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*Nset, Nset=Internal_Selection-1_Fixed-2
205, 207, 247, 268, 270, 310
*Nset, Nset=Internal-1_Internal_Selection-1_Surface_Traction-2
204, 206, 227, 267, 269, 290
**
** Element sets ++++++++++++++++++++++++++++++++++++++++++++
**
*Elset, Elset=Internal_Selection-1_Solid_Section-1
Solid_beam
*Elset, Elset=Internal-1_Internal_Selection-1_Surface_Traction-1_S5
10, 20
*Elset, Elset=Internal-1_Internal_Selection-1_Shell_top_to_Solid_beam_Master_S2
21, 22, 23, 24, 25, 26, 27, 28, 29, 30
*Elset, Elset=Internal-1_Internal_Selection-1_Shell_top_to_Solid_beam_Slave_S6
1, 2, 3, 4, 5, 6, 7, 8, 9, 10
*Elset, Elset=Internal-1_Internal_Selection-1_Shell_bottom_to_Solid_beam_Master_S1
41, 42, 43, 44, 45, 46, 47, 48, 49, 50
*Elset, Elset=Internal-1_Internal_Selection-1_Shell_bottom_to_Solid_beam_Slave_S4
11, 12, 13, 14, 15, 16, 17, 18, 19, 20
*Elset, Elset=Internal_Selection-1_Shell_Section-1
21, 22, 23, 24, 25, 26, 27, 28, 29, 30
*Elset, Elset=Internal_Selection-1_Shell_Section-2
41, 42, 43, 44, 45, 46, 47, 48, 49, 50
*Elset, Elset=Internal-1_Internal_Selection-1_Surface_Traction-2_S3
21, 41
**
** Surfaces ++++++++++++++++++++++++++++++++++++++++++++++++
**
*Surface, Name=Internal_Selection-1_Surface_Traction-1, Type=Element
Internal-1_Internal_Selection-1_Surface_Traction-1_S5, S5
*Surface, Name=Internal_Selection-1_Shell_top_to_Solid_beam_Master, Type=Element
Internal-1_Internal_Selection-1_Shell_top_to_Solid_beam_Master_S2, S2
*Surface, Name=Internal_Selection-1_Shell_top_to_Solid_beam_Slave, Type=Element
Internal-1_Internal_Selection-1_Shell_top_to_Solid_beam_Slave_S6, S6
*Surface, Name=Internal_Selection-1_Shell_bottom_to_Solid_beam_Master, Type=Element
Internal-1_Internal_Selection-1_Shell_bottom_to_Solid_beam_Master_S1, S1
*Surface, Name=Internal_Selection-1_Shell_bottom_to_Solid_beam_Slave, Type=Element
Internal-1_Internal_Selection-1_Shell_bottom_to_Solid_beam_Slave_S4, S4
*Surface, Name=Internal_Selection-1_Surface_Traction-2, Type=Element
Internal-1_Internal_Selection-1_Surface_Traction-2_S3, S3
**
** Physical constants ++++++++++++++++++++++++++++++++++++++
**
**
** Coordinate systems ++++++++++++++++++++++++++++++++++++++
**
**
** Materials +++++++++++++++++++++++++++++++++++++++++++++++
**
*Material, Name=S235
*Density
7800
*Elastic
210000000000, 0.28
*Expansion, Zero=20
1.1E-05
*Conductivity
14
*Specific heat
440
**
** Sections ++++++++++++++++++++++++++++++++++++++++++++++++
**
*Solid section, Elset=Internal_Selection-1_Solid_Section-1, Material=S235
*Shell section, Elset=Internal_Selection-1_Shell_Section-1, Material=S235, Offset=0.5
0.01
*Shell section, Elset=Internal_Selection-1_Shell_Section-2, Material=S235, Offset=-0.5
0.01
**
** Pre-tension sections ++++++++++++++++++++++++++++++++++++
**
**
** Constraints +++++++++++++++++++++++++++++++++++++++++++++
**
*Tie, Name=Shell_top_to_Solid_beam, Position tolerance=0.015, Adjust=No
Internal_Selection-1_Shell_top_to_Solid_beam_Slave, Internal_Selection-1_Shell_top_to_Solid_beam_Master
*Tie, Name=Shell_bottom_to_Solid_beam, Position tolerance=0.015, Adjust=No
Internal_Selection-1_Shell_bottom_to_Solid_beam_Slave, Internal_Selection-1_Shell_bottom_to_Solid_beam_Master
**
** Surface interactions ++++++++++++++++++++++++++++++++++++
**
**
** Contact pairs +++++++++++++++++++++++++++++++++++++++++++
**
**
** Amplitudes ++++++++++++++++++++++++++++++++++++++++++++++
**
**
** Initial conditions ++++++++++++++++++++++++++++++++++++++
**
**
** Steps +++++++++++++++++++++++++++++++++++++++++++++++++++
**
**
** Step-1 ++++++++++++++++++++++++++++++++++++++++++++++++++
**
*Step
*Static
**
** Controls ++++++++++++++++++++++++++++++++++++++++++++++++
**
**
** Output frequency ++++++++++++++++++++++++++++++++++++++++
**
**
** Boundary conditions +++++++++++++++++++++++++++++++++++++
**
*Boundary, op=New
** Name: Fixed-1
*Boundary
Internal_Selection-1_Fixed-1, 1, 6, 0
** Name: Fixed-2
*Boundary
Internal_Selection-1_Fixed-2, 1, 6, 0
**
** Loads +++++++++++++++++++++++++++++++++++++++++++++++++++
**
*Cload, op=New
*Dload, op=New
** Name: Surface_Traction-1
*Cload
31, 2, 69.4444416666667
54, 2, 69.4444416666667
6, 2, 34.7222208333334
4, 2, 34.7222208333334
138, 2, -2.77777767E+002
55, 2, -1.38888883E+002
57, 2, -1.38888883E+002
32, 2, -1.38888883E+002
3, 2, 34.7222208333333
5, 2, 34.7222208333333
53, 2, -1.38888883E+002
56, 2, -1.38888883E+002
33, 2, -1.38888883E+002
** Name: Surface_Traction-2
*Cload
204, 2, -1.38888917E+001
206, 2, -1.38888917E+001
227, 2, -5.55555667E+001
267, 2, -1.38888917E+001
269, 2, -1.38888917E+001
290, 2, -5.55555667E+001
**
** Defined fields ++++++++++++++++++++++++++++++++++++++++++
**
**
** History outputs +++++++++++++++++++++++++++++++++++++++++
**
**
** Field outputs +++++++++++++++++++++++++++++++++++++++++++
**
*Node file
RF, U
*El file
S, E, NOE
**
** End step ++++++++++++++++++++++++++++++++++++++++++++++++
**
*End step
